*HEADING
NAFEMS TEST NLE10, COARSE MESH, C3D10M ELEMENTS  -- NLE10C_C3D10M
**
*RESTART, WRITE
**
*NODE
       1,     2.83277,       1.348
       2,     2.48116,     1.04837
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**
**
*ELEMENT, TYPE=C3D10M, ELSET=EALL
       1,       1,       7,      18,       3,       4,      14,      10,
       2,       6,      11
       2,      24,      18,       7,      26,      23,      14,      15,
      25,      21,      16
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**
** eall
**
*SOLID SECTION, ELSET=EALL, MATERIAL=STEEL
          1.,
**
** steel
** Date: 23-May-96           Time: 17:30:54
**
*MATERIAL, NAME=STEEL
**
*ELASTIC, TYPE=ISO
     2.1E+11,         0.3
*DENSITY
7800.,
**
** step  1,Default
**
*NSET,NSET=ZFIX
233,237,104,107,18,23,24
*ELSET,ELSET=EOUT
18,19,17,20
*AMPLITUDE,NAME=RAMP,DEFINITION=SMOOTH STEP
0.0,0.0,0.4,1.0
*STEP
*DYNAMIC,EXPLICIT
,0.40
**
** yfix
**
*BOUNDARY
       8, 2,,          0.
       9, 2,,          0.
      16, 2,,          0.
      17, 2,,          0.
      25, 2,,          0.
      26, 2,,          0.
      33, 2,,          0.
      34, 2,,          0.
      42, 2,,          0.
      43, 2,,          0.
      51, 2,,          0.
      52, 2,,          0.
      59, 2,,          0.
      60, 2,,          0.
      68, 2,,          0.
      69, 2,,          0.
      76, 2,,          0.
      77, 2,,          0.
      85, 2,,          0.
      86, 2,,          0.
**
** xfix
**
*BOUNDARY
     173, 1,,          0.
     174, 1,,          0.
     175, 1,,          0.
     182, 1,,          0.
     183, 1,,          0.
     184, 1,,          0.
     190, 1,,          0.
     191, 1,,          0.
     192, 1,,          0.
     199, 1,,          0.
     200, 1,,          0.
     201, 1,,          0.
     207, 1,,          0.
     208, 1,,          0.
     209, 1,,          0.
     217, 1,,          0.
     226, 1,,          0.
     234, 1,,          0.
     243, 1,,          0.
     251, 1,,          0.
**
** curvefix
**
*BOUNDARY
       1, 1,,          0.
       1, 2,,          0.
       4, 1,,          0.
       4, 2,,          0.
       7, 1,,          0.
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     253, 2,,          0.
*BOUNDARY
ZFIX,3,3,0.
**
** load
**
*DLOAD, AMP=RAMP
       7, P4,       1.E+6
       9, P4,       1.E+6
      17, P2,       1.E+6
      19, P2,       1.E+6
      27, P2,       1.E+6
      29, P2,       1.E+6
      37, P4,       1.E+6
      39, P4,       1.E+6
      47, P2,       1.E+6
      49, P2,       1.E+6
      57, P4,       1.E+6
      59, P4,       1.E+6
**
***OUTPUT,HISTORY,TIME INTERVAL=1.0E-4
***ELEMENT OUTPUT,ELSET=EOUT
**S,
***ENERGY OUTPUT
**ALLKE,ALLIE,ALLSE,ALLAE,ALLVD,ALLCD,ALLPD,ALLFD,ALLWK,ETOTAL,DT
*OUTPUT,FIELD,VAR=PRESELECT,NUMBER INTERVAL=5
**
** Output requests for qa testing
**
*NSET, NSET=QA_TEST
175, 209, 192
184, 201,
52, 86, 69,
60, 77,
*FILE OUTPUT,NUM=1
*NODE FILE, NSET=QA_TEST
U,
*ENERGY FILE
*OUTPUT,FIELD,NUMBER INTERVAL=1
*NODE OUTPUT, NSET=QA_TEST
U,
*OUTPUT,HISTORY,VAR=PRESELECT,TIME INTERVAL=0.1
*END STEP
