*HEADING
NAFEMS TEST NLE10 WITH C3D10M ELEMENTS, REFINED MESH  NLE10F_C3D10M
**
*RESTART, WRITE
**
*NODE
       1,          0.,        2.75
       2,          0.,     2.45825
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**
**
*ELEMENT, TYPE=C3D10M, ELSET=EALL
       1,       1,      11,      47,       3,       7,      31,      26,
       2,      10,      27
       2,      57,      47,      11,      59,      53,      31,      34,
      58,      52,      35
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**
** eall
**
*SOLID SECTION, ELSET=EALL, MATERIAL=STEEL
          1.,
**
** steel
** Date: 23-May-96           Time: 17:30:54
**
*MATERIAL, NAME=STEEL
**
*ELASTIC, TYPE=ISO
     2.1E+11,         0.3
*DENSITY
7800.,
*NSET,NSET=ZFIX
47,53,57,63,67,287,291,297,301,638,642,648,652
*ELSET,ELSET=EOUT
199,
*AMPLITUDE,NAME=RAMP,DEFINITION=SMOOTH STEP
0.0,0.0,0.4,1.0
*STEP
*DYNAMIC,EXPLICIT
,0.40
**
** yfix
**
*BOUNDARY, OP=NEW
     489, 2,,          0.
     490, 2,,          0.
     491, 2,,          0.
     492, 2,,          0.
     493, 2,,          0.
     510, 2,,          0.
     511, 2,,          0.
     512, 2,,          0.
     513, 2,,          0.
     514, 2,,          0.
     535, 2,,          0.
     536, 2,,          0.
     537, 2,,          0.
     538, 2,,          0.
     539, 2,,          0.
     556, 2,,          0.
     557, 2,,          0.
     558, 2,,          0.
     559, 2,,          0.
     560, 2,,          0.
     581, 2,,          0.
     582, 2,,          0.
     583, 2,,          0.
     584, 2,,          0.
     585, 2,,          0.
     607, 2,,          0.
     608, 2,,          0.
     609, 2,,          0.
     628, 2,,          0.
     629, 2,,          0.
     630, 2,,          0.
     653, 2,,          0.
     654, 2,,          0.
     655, 2,,          0.
     674, 2,,          0.
     675, 2,,          0.
     676, 2,,          0.
     699, 2,,          0.
     700, 2,,          0.
     701, 2,,          0.
ZFIX,3,,0.
**
** xfix
**
*BOUNDARY, OP=NEW
       2, 1,,          0.
       3, 1,,          0.
       4, 1,,          0.
       5, 1,,          0.
      27, 1,,          0.
      28, 1,,          0.
      29, 1,,          0.
      30, 1,,          0.
      48, 1,,          0.
      49, 1,,          0.
      50, 1,,          0.
      51, 1,,          0.
      73, 1,,          0.
      74, 1,,          0.
      75, 1,,          0.
      76, 1,,          0.
      94, 1,,          0.
      95, 1,,          0.
      96, 1,,          0.
      97, 1,,          0.
     119, 1,,          0.
     120, 1,,          0.
     121, 1,,          0.
     122, 1,,          0.
     144, 1,,          0.
     145, 1,,          0.
     146, 1,,          0.
     147, 1,,          0.
     165, 1,,          0.
     166, 1,,          0.
     167, 1,,          0.
     168, 1,,          0.
     190, 1,,          0.
     191, 1,,          0.
     192, 1,,          0.
     193, 1,,          0.
     211, 1,,          0.
     212, 1,,          0.
     213, 1,,          0.
     214, 1,,          0.
**
** curvefix
**
*BOUNDARY, OP=NEW
       1, 1,,          0.
       1, 2,,          0.
       7, 1,,          0.
       7, 2,,          0.
      11, 1,,          0.
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     698, 2,,          0.
**
** load
**
*DLOAD, AMP=RAMP
      22, P4,       1.E+6
      24, P4,       1.E+6
      27, P2,       1.E+6
      29, P2,       1.E+6
      32, P2,       1.E+6
      34, P2,       1.E+6
      37, P4,       1.E+6
      39, P4,       1.E+6
      62, P4,       1.E+6
      64, P4,       1.E+6
      67, P2,       1.E+6
      69, P2,       1.E+6
      72, P2,       1.E+6
      74, P2,       1.E+6
      77, P4,       1.E+6
      79, P4,       1.E+6
     102, P4,       1.E+6
     104, P4,       1.E+6
     107, P2,       1.E+6
     109, P2,       1.E+6
     112, P2,       1.E+6
     114, P2,       1.E+6
     117, P4,       1.E+6
     119, P4,       1.E+6
     142, P4,       1.E+6
     144, P4,       1.E+6
     147, P2,       1.E+6
     149, P2,       1.E+6
     152, P2,       1.E+6
     154, P2,       1.E+6
     157, P4,       1.E+6
     159, P4,       1.E+6
     182, P4,       1.E+6
     184, P4,       1.E+6
     187, P2,       1.E+6
     189, P2,       1.E+6
     192, P2,       1.E+6
     194, P2,       1.E+6
     197, P4,       1.E+6
     199, P4,       1.E+6
     222, P4,       1.E+6
     224, P4,       1.E+6
     227, P2,       1.E+6
     229, P2,       1.E+6
     232, P2,       1.E+6
     234, P2,       1.E+6
     237, P4,       1.E+6
     239, P4,       1.E+6
***OUTPUT,HISTORY,TIME INTERVAL=1.0E-4
***ELEMENT OUTPUT,ELSET=EOUT
**S,
***ENERGY OUTPUT
**ALLKE,ALLIE,ALLSE,ALLAE,ALLVD,ALLCD,ALLPD,ALLFD,ALLWK,ETOTAL,DT
*OUTPUT,FIELD,VAR=PRESELECT,NUMBER INTERVAL=5
**
** Output requests for qa testing
**
*NSET, NSET=QA_TEST
122, 147, 168, 193, 214
493, 514, 539, 560, 585
*NSET, NSET=QA_TEST
175, 209, 192
184, 201,
52, 86, 69,
60, 77,
*FILE OUTPUT,NUM=1
*NODE FILE, NSET=QA_TEST
U,
*ENERGY FILE
*OUTPUT,FIELD,NUMBER INTERVAL=1
*NODE OUTPUT, NSET=QA_TEST
U,
*OUTPUT,HISTORY,VAR=PRESELECT,TIME INTERVAL=0.1
*END STEP
