*HEADING
NAFEMS TEST NLE10, REFINED MESH, C3D10HS ELEMENTS --
**
**RESTART, WRITE, FREQUENCY=1
**
*NODE
       1,          0.,        2.75
       2,          0.,     2.45825
       3,          0.,      2.1665
       4,          0.,     1.87475
       5,          0.,       1.583
       6,    0.349721,     1.84088
       7,    0.464205,      2.7218
       8,    0.407787,     2.14399
       9,    0.351377,     1.56618
      10,    0.460635,     2.40185
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**
**
*ELEMENT, TYPE=C3D10HS, ELSET=EALL
       1,       1,      11,      47,       3,       7,      31,      26,
       2,      10,      27
       2,      57,      47,      11,      59,      53,      31,      34,
      58,      52,      35
       3,      13,       3,      59,      11,       8,      32,      36,
      12,      10,      35
       4,      49,      59,       3,      47,      54,      32,      28,
      48,      52,      27
       5,       3,      11,      47,      59,      10,      31,      27,
      32,      35,      52
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**
** eall
**
*SOLID SECTION, ELSET=EALL, MATERIAL=STEEL
          1.,
**
** steel
** Date: 23-May-96           Time: 17:30:54
**
*MATERIAL, NAME=STEEL
**
*ELASTIC, TYPE=ISO
     2.1E+11,         0.3
*NSET,NSET=ZFIX
47,53,57,63,67,287,291,297,301,638,642,648,652
*ELSET,ELSET=EOUT
199,
**
** step  1,Default
**
*STEP, PERT
This load case is the default load case that always appears
*STATIC
**
** yfix
**
*BOUNDARY, OP=NEW
     489, 2,,          0.
     490, 2,,          0.
     491, 2,,          0.
     492, 2,,          0.
     493, 2,,          0.
     510, 2,,          0.
     511, 2,,          0.
     512, 2,,          0.
     513, 2,,          0.
     514, 2,,          0.
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**
** xfix
**
*BOUNDARY, OP=NEW
       2, 1,,          0.
       3, 1,,          0.
       4, 1,,          0.
       5, 1,,          0.
      27, 1,,          0.
      28, 1,,          0.
      29, 1,,          0.
      30, 1,,          0.
      48, 1,,          0.
      49, 1,,          0.
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**
** curvefix
**
*BOUNDARY, OP=NEW
       1, 1,,          0.
       1, 2,,          0.
       7, 1,,          0.
       7, 2,,          0.
      11, 1,,          0.
      11, 2,,          0.
      17, 1,,          0.
      17, 2,,          0.
      21, 1,,          0.
      21, 2,,          0.
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**
** load
**
*DLOAD, OP=NEW
      22, P4,       1.E+6
      24, P4,       1.E+6
      27, P2,       1.E+6
      29, P2,       1.E+6
      32, P2,       1.E+6
      34, P2,       1.E+6
      37, P4,       1.E+6
      39, P4,       1.E+6
      62, P4,       1.E+6
      64, P4,       1.E+6
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**
*NODE PRINT, FREQ=0
U,
*EL PRINT,FREQ=1,ELSET=EOUT,POSITION=AVERAGED AT NODES
S,
**
*EL FILE, POSITION=AVERAGED AT NODES, FREQ=1,ELSET=EOUT
S,
**
*END STEP
