*HEADING
 NAFEMS TEST LE3, Hemispherical Shell with Point Loads  [SC6R]
 TEST STACK DIR=ORIENTATION WITH SPHERICAL ORIENTATION SYSTEM
*NODE
 26,  0.0000000E+00,   3.819146    ,   9.220323
 64,   9.980000    ,  0.0000000E+00,  0.0000000E+00
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*ELEMENT,TYPE=SC6R     ,ELSET=S4_P4
 3000 ,   64,    65,    69,  1064,  1065,  1069
 3001 , 1069,  1070,  1065,    69,    70,    65
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*ELSET,ELSET=EALL
 S4_P4
*MATERIAL,NAME=A1
*ELASTIC,TYPE=ISO
 6.825E+07,     0.3000,     0.0000
*SHELL SECTION,MATERIAL=A1,ELSET=EALL, STACK DIR=ORIENTATION, ORIENTATION=SPH, POISSON=ELASTIC
 4.000E-02,
*ORIENTATION, SYSTEM=SPHERICAL, NAME=SPH
 0.0, 0.0, 0.0, 1.0, 0.0, 0.0
 1, 0.0
*NSET,NSET=ZCONSTR
 121,1121
*NSET,NSET=XSYM
 92,96,100,104,108,121
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*NSET,NSET=YSYM
 64,69,74,79,84,109
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*NSET,NSET=DISPSET_FINE
 64,1064
*NSET,NSET=DISPSET
 DISPSET_FINE
*BOUNDARY,OP=NEW
 XSYM,XSYMM
 YSYM,YSYMM
 ZCONSTR,3,3
*RESTART,WRITE
*STEP
*STATIC
*CLOAD,OP=NEW
   64,     1,  1.000E+00
 1064,     1,  1.000E+00
   92,     2, -1.000E+00
 1092,     2, -1.000E+00
*NODE PRINT,NSET=DISPSET_FINE
 U,
*NODE FILE,NSET=DISPSET
 U,
*OUTPUT,FIELD
*NODE OUTPUT
 U,
*ELEMENT OUTPUT
 S,
*END STEP
