*HEADING
  NAFEMS TEST LE3, Hemispherical Shell with Point Loads  [SC8R]
  Using *SHELL GENERAL SECTION
*NODE
 8,   9.980000    ,  0.0000000E+00,  0.0000000E+00
 9,   9.220323    ,   3.819146    ,  0.0000000E+00
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*ELEMENT,TYPE=SC8R     ,ELSET=S4_P2
 1000,     8,     9,    12,    11, 1008,  1009,  1012,  1011
 1001,     9,    10,    13,    12, 1009,  1010,  1013,  1012
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*ELEMENT,TYPE=SC8R     ,ELSET=S4_P4
 3000,    64,    65,    70,    69, 1064,  1065,  1070,  1069
 3001,    65,    66,    71,    70, 1065,  1066,  1071,  1070
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*ELSET,ELSET=EALL
 S4_P2,S4_P4
*MATERIAL,NAME=A1
*ELASTIC,TYPE=ISO
 6.825E+07,     0.3000,     0.0000
*SHELL GENERAL SECTION,MATERIAL=A1,ELSET=EALL
 4.000E-02,
*NSET,NSET=ZCONSTR
 121,25,1121,1025
*NSET,NSET=XSYM
 18,20,22,25,26,92
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*NSET,NSET=YSYM
 8,11,14,23,25,64
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*NSET,NSET=DISPSET_FINE
 64,1064
*NSET,NSET=DISPSET_COARSE
 8,1008
*NSET,NSET=DISPSET
 DISPSET_FINE,DISPSET_COARSE
*BOUNDARY,OP=NEW
 XSYM,XSYMM
 YSYM,YSYMM
 ZCONSTR,3,3
*RESTART,WRITE
*STEP,PERTURB
*STATIC
*CLOAD,OP=NEW
    8,     1,  1.000E+00
 1008,     1,  1.000E+00
   18,     2, -1.000E+00
 1018,     2, -1.000E+00
   64,     1,  1.000E+00
 1064,     1,  1.000E+00
   92,     2, -1.000E+00
 1092,     2, -1.000E+00
*NODE PRINT,NSET=DISPSET_FINE
 U,
*NODE PRINT,NSET=DISPSET_COARSE
 U,
*NODE FILE,NSET=DISPSET
 U,
*OUTPUT,FIELD
*NODE OUTPUT
 U,
*ELEMENT OUTPUT
 S,
*END STEP
