*HEADING
: NAFEMS TEST LE3, Hemispherical Shell with Point Loads  [S8R5]
*ELEMENT,TYPE=S8R5     ,ELSET=S8_P2
 2001, 20001, 20003, 20203, 20201, 20002, 20103, 20202, 20101
 2002, 20003, 20005, 20205, 20203, 20004, 20105, 20204, 20103
 2003, 20005, 20007, 20207, 20205, 20006, 20107, 20206, 20105
 2004, 20007, 20009, 20209, 20207, 20008, 20109, 20208, 20107
 2005, 20201, 20203, 20403, 20401, 20202, 20303, 20402, 20301
 2006, 20203, 20205, 20405, 20403, 20204, 20305, 20404, 20303
 2007, 20205, 20207, 20407, 20405, 20206, 20307, 20406, 20305
 2008, 20207, 20209, 20409, 20407, 20208, 20309, 20408, 20307
 2009, 20403, 20405, 20407, 20603, 20404, 20406, 20604, 20503
 2010, 20401, 20403, 20603, 20601, 20402, 20503, 20602, 20501
 2011, 20603, 20407, 20409, 20803, 20604, 20408, 20804, 20703
 2012, 20601, 20603, 20803, 20801, 20602, 20703, 20802, 20701
*ELEMENT,TYPE=S8R5     ,ELSET=S8_P4
 4001, 40001, 40003, 40203, 40201, 40002, 40103, 40202, 40101
 4002, 40003, 40005, 40205, 40203, 40004, 40105, 40204, 40103
 4003, 40005, 40007, 40207, 40205, 40006, 40107, 40206, 40105
 4004, 40007, 40009, 40209, 40207, 40008, 40109, 40208, 40107
 4005, 40009, 40011, 40211, 40209, 40010, 40111, 40210, 40109
 4006, 40011, 40013, 40213, 40211, 40012, 40113, 40212, 40111
 4007, 40013, 40015, 40215, 40213, 40014, 40115, 40214, 40113
 4008, 40015, 40017, 40217, 40215, 40016, 40117, 40216, 40115
 4009, 40201, 40203, 40403, 40401, 40202, 40303, 40402, 40301
 4010, 40203, 40205, 40405, 40403, 40204, 40305, 40404, 40303
 4011, 40205, 40207, 40407, 40405, 40206, 40307, 40406, 40305
 4012, 40207, 40209, 40409, 40407, 40208, 40309, 40408, 40307
 4013, 40209, 40211, 40411, 40409, 40210, 40311, 40410, 40309
 4014, 40211, 40213, 40413, 40411, 40212, 40313, 40412, 40311
 4015, 40213, 40215, 40415, 40413, 40214, 40315, 40414, 40313
 4016, 40215, 40217, 40417, 40415, 40216, 40317, 40416, 40315
 4017, 40401, 40403, 40603, 40601, 40402, 40503, 40602, 40501
 4018, 40403, 40405, 40605, 40603, 40404, 40505, 40604, 40503
 4019, 40405, 40407, 40607, 40605, 40406, 40507, 40606, 40505
 4020, 40407, 40409, 40609, 40607, 40408, 40509, 40608, 40507
 4021, 40409, 40411, 40611, 40609, 40410, 40511, 40610, 40509
 4022, 40411, 40413, 40613, 40611, 40412, 40513, 40612, 40511
 4023, 40413, 40415, 40615, 40613, 40414, 40515, 40614, 40513
 4024, 40415, 40417, 40617, 40615, 40416, 40517, 40616, 40515
 4025, 40601, 40603, 40803, 40801, 40602, 40703, 40802, 40701
 4026, 40603, 40605, 40805, 40803, 40604, 40705, 40804, 40703
 4027, 40605, 40607, 40807, 40805, 40606, 40707, 40806, 40705
 4028, 40607, 40609, 40809, 40807, 40608, 40709, 40808, 40707
 4029, 40609, 40611, 40811, 40809, 40610, 40711, 40810, 40709
 4030, 40611, 40613, 40813, 40811, 40612, 40713, 40812, 40711
 4031, 40613, 40615, 40815, 40813, 40614, 40715, 40814, 40713
 4032, 40615, 40617, 40817, 40815, 40616, 40717, 40816, 40715
 4033, 40807, 40809, 40811, 41007, 40808, 40810, 41008, 40907
 4034, 40801, 40803, 41003, 41001, 40802, 40903, 41002, 40901
 4035, 40803, 40805, 41005, 41003, 40804, 40905, 41004, 40903
 4036, 40805, 40807, 41007, 41005, 40806, 40907, 41006, 40905
 4037, 41007, 40811, 40813, 41207, 41008, 40812, 41208, 41107
 4038, 41207, 40813, 40815, 41407, 41208, 40814, 41408, 41307
 4039, 41407, 40815, 40817, 41607, 41408, 40816, 41608, 41507
 4040, 41001, 41003, 41203, 41201, 41002, 41103, 41202, 41101
 4041, 41003, 41005, 41205, 41203, 41004, 41105, 41204, 41103
 4042, 41005, 41007, 41207, 41205, 41006, 41107, 41206, 41105
 4043, 41201, 41203, 41403, 41401, 41202, 41303, 41402, 41301
 4044, 41203, 41205, 41405, 41403, 41204, 41305, 41404, 41303
 4045, 41205, 41207, 41407, 41405, 41206, 41307, 41406, 41305
 4046, 41401, 41403, 41603, 41601, 41402, 41503, 41602, 41501
 4047, 41403, 41405, 41605, 41603, 41404, 41505, 41604, 41503
 4048, 41405, 41407, 41607, 41605, 41406, 41507, 41606, 41505
*NODE,NSET=DISPSET
20001,    10.0000,     0.0000,     0.0000,     1.0000,     0.0000,     0.0000
20009,     0.0000,    10.0000,     0.0000,     0.0000,     1.0000,     0.0000
40001,    10.0000,     0.0000,     0.0000,     1.0000,     0.0000,     0.0000
40017,     0.0000,    10.0000,     0.0000,     0.0000,     1.0000,     0.0000
*NODE,NSET=GENSET
20002,     9.8079,     1.9509,     0.0000,     0.9808,     0.1951,     0.0000
20003,     9.2388,     3.8268,     0.0000,     0.9239,     0.3827,     0.0000
20004,     8.3147,     5.5557,     0.0000,     0.8315,     0.5556,     0.0000
20005,     7.0711,     7.0711,     0.0000,     0.7071,     0.7071,     0.0000
20101,     9.8079,     0.0000,     1.9509,     0.9808,     0.0000,     0.1951
20103,     9.0787,     3.7605,     1.8538,     0.9079,     0.3760,     0.1854
20105,     6.9875,     6.9875,     1.5326,     0.6988,     0.6988,     0.1533
20201,     9.2388,     0.0000,     3.8268,     0.9239,     0.0000,     0.3827
20202,     9.0794,     1.8060,     3.7820,     0.9079,     0.1806,     0.3782
20203,     8.6038,     3.5638,     3.6434,     0.8604,     0.3564,     0.3643
20204,     7.8196,     5.2249,     3.3991,     0.7820,     0.5225,     0.3399
20205,     6.7389,     6.7389,     3.0291,     0.6739,     0.6739,     0.3029
20301,     8.3147,     0.0000,     5.5557,     0.8315,     0.0000,     0.5556
20303,     7.8306,     3.2435,     5.3067,     0.7831,     0.3244,     0.5307
20305,     6.3310,     6.3310,     4.4539,     0.6331,     0.6331,     0.4454
20401,     7.0711,     0.0000,     7.0711,     0.7071,     0.0000,     0.7071
20402,     7.0021,     1.3928,     7.0021,     0.7002,     0.1393,     0.7002
20403,     6.7860,     2.8108,     6.7860,     0.6786,     0.2811,     0.6786
20404,     6.3934,     4.2719,     6.3934,     0.6393,     0.4272,     0.6393
20405,     5.7735,     5.7735,     5.7735,     0.5774,     0.5774,     0.5774
20006,     5.5557,     8.3147,     0.0000,     0.5556,     0.8315,     0.0000
20007,     3.8268,     9.2388,     0.0000,     0.3827,     0.9239,     0.0000
20008,     1.9509,     9.8079,     0.0000,     0.1951,     0.9808,     0.0000
20107,     3.7605,     9.0786,     1.8538,     0.3761,     0.9079,     0.1854
20109,     0.0000,     9.8079,     1.9509,     0.0000,     0.9808,     0.1951
20206,     5.2249,     7.8196,     3.3991,     0.5225,     0.7820,     0.3399
20207,     3.5638,     8.6038,     3.6434,     0.3564,     0.8604,     0.3643
20208,     1.8060,     9.0794,     3.7820,     0.1806,     0.9079,     0.3782
20209,     0.0000,     9.2388,     3.8268,     0.0000,     0.9239,     0.3827
20307,     3.2435,     7.8306,     5.3067,     0.3244,     0.7831,     0.5307
20309,     0.0000,     8.3147,     5.5557,     0.0000,     0.8315,     0.5556
20406,     4.2719,     6.3934,     6.3934,     0.4272,     0.6393,     0.6393
20407,     2.8109,     6.7860,     6.7860,     0.2811,     0.6786,     0.6786
20408,     1.3928,     7.0021,     7.0021,     0.1393,     0.7002,     0.7002
20409,     0.0000,     7.0711,     7.0711,     0.0000,     0.7071,     0.7071
20501,     5.5557,     0.0000,     8.3147,     0.5556,     0.0000,     0.8315
20503,     5.2249,     3.3991,     7.8196,     0.5225,     0.3399,     0.7820
20601,     3.8268,     0.0000,     9.2388,     0.3827,     0.0000,     0.9239
20602,     3.7605,     1.8538,     9.0786,     0.3761,     0.1854,     0.9079
20603,     3.5638,     3.6434,     8.6038,     0.3564,     0.3643,     0.8604
20604,     3.2435,     5.3067,     7.8306,     0.3244,     0.5307,     0.7831
20701,     1.9509,     0.0000,     9.8079,     0.1951,     0.0000,     0.9808
20703,     1.8060,     3.7820,     9.0794,     0.1806,     0.3782,     0.9079
20801,     0.0000,     0.0000,    10.0000,     0.0000,     0.0000,     1.0000
20802,     0.0000,     1.9509,     9.8079,     0.0000,     0.1951,     0.9808
20803,     0.0000,     3.8268,     9.2388,     0.0000,     0.3827,     0.9239
20804,     0.0000,     5.5557,     8.3147,     0.0000,     0.5556,     0.8315
40002,     9.9518,     0.9802,     0.0000,     0.9952,     0.0980,     0.0000
40003,     9.8079,     1.9509,     0.0000,     0.9808,     0.1951,     0.0000
40004,     9.5694,     2.9028,     0.0000,     0.9569,     0.2903,     0.0000
40005,     9.2388,     3.8268,     0.0000,     0.9239,     0.3827,     0.0000
40006,     8.8192,     4.7140,     0.0000,     0.8819,     0.4714,     0.0000
40007,     8.3147,     5.5557,     0.0000,     0.8315,     0.5556,     0.0000
40008,     7.7301,     6.3439,     0.0000,     0.7730,     0.6344,     0.0000
40009,     7.0711,     7.0711,     0.0000,     0.7071,     0.7071,     0.0000
40101,     9.9518,     0.0000,     0.9802,     0.9952,     0.0000,     0.0980
40103,     9.7618,     1.9417,     0.9681,     0.9762,     0.1942,     0.0968
40105,     9.1987,     3.8102,     0.9310,     0.9199,     0.3810,     0.0931
40107,     8.2835,     5.5348,     0.8660,     0.8283,     0.5535,     0.0866
40109,     7.0502,     7.0501,     0.7686,     0.7050,     0.7050,     0.0769
40201,     9.8079,     0.0000,     1.9509,     0.9808,     0.0000,     0.1951
40202,     9.7618,     0.9615,     1.9450,     0.9762,     0.0961,     0.1945
40203,     9.6240,     1.9143,     1.9271,     0.9624,     0.1914,     0.1927
40204,     9.3957,     2.8501,     1.8969,     0.9396,     0.2850,     0.1897
40205,     9.0787,     3.7605,     1.8538,     0.9079,     0.3760,     0.1854
40206,     8.6756,     4.6372,     1.7970,     0.8676,     0.4637,     0.1797
40207,     8.1900,     5.4724,     1.7254,     0.8190,     0.5472,     0.1725
40208,     7.6257,     6.2583,     1.6378,     0.7626,     0.6258,     0.1638
40209,     6.9875,     6.9875,     1.5326,     0.6988,     0.6988,     0.1533
40301,     9.5694,     0.0000,     2.9028,     0.9569,     0.0000,     0.2903
40303,     9.3958,     1.8689,     2.8680,     0.9396,     0.1869,     0.2868
40305,     8.8798,     3.6781,     2.7606,     0.8880,     0.3678,     0.2761
40307,     8.0350,     5.3688,     2.5719,     0.8035,     0.5369,     0.2572
40309,     6.8836,     6.8836,     2.2876,     0.6884,     0.6884,     0.2288
40401,     9.2388,     0.0000,     3.8268,     0.9239,     0.0000,     0.3827
40402,     9.1989,     0.9060,     3.8157,     0.9199,     0.0906,     0.3816
40403,     9.0794,     1.8060,     3.7820,     0.9079,     0.1806,     0.3782
40404,     8.8807,     2.6939,     3.7250,     0.8881,     0.2694,     0.3725
40405,     8.6038,     3.5638,     3.6434,     0.8604,     0.3564,     0.3643
40406,     8.2496,     4.4095,     3.5355,     0.8250,     0.4410,     0.3536
40407,     7.8196,     5.2249,     3.3991,     0.7820,     0.5225,     0.3399
40408,     7.3154,     6.0036,     3.2313,     0.7315,     0.6004,     0.3231
40409,     6.7389,     6.7389,     3.0291,     0.6739,     0.6739,     0.3029
40501,     8.8192,     0.0000,     4.7140,     0.8819,     0.0000,     0.4714
40503,     8.6776,     1.7261,     4.6604,     0.8678,     0.1726,     0.4660
40505,     8.2530,     3.4185,     4.4946,     0.8253,     0.3419,     0.4495
40507,     7.5455,     5.0417,     4.2007,     0.7546,     0.5042,     0.4201
40509,     6.5543,     6.5543,     3.7526,     0.6554,     0.6554,     0.3753
40601,     8.3147,     0.0000,     5.5557,     0.8315,     0.0000,     0.5556
40602,     8.2847,     0.8160,     5.5406,     0.8285,     0.0816,     0.5541
40603,     8.1944,     1.6300,     5.4951,     0.8194,     0.1630,     0.5495
40604,     8.0433,     2.4399,     5.4178,     0.8043,     0.2440,     0.5418
40605,     7.8306,     3.2435,     5.3067,     0.7831,     0.3244,     0.5307
40606,     7.5550,     4.0382,     5.1590,     0.7555,     0.4038,     0.5159
40607,     7.2147,     4.8207,     4.9708,     0.7215,     0.4821,     0.4971
40608,     6.8076,     5.5868,     4.7375,     0.6808,     0.5587,     0.4738
40609,     6.3310,     6.3310,     4.4539,     0.6331,     0.6331,     0.4454
40701,     7.7301,     0.0000,     6.3439,     0.7730,     0.0000,     0.6344
40703,     7.6341,     1.5185,     6.2781,     0.7634,     0.1519,     0.6278
40705,     7.3402,     3.0404,     6.0727,     0.7340,     0.3040,     0.6073
40707,     6.8297,     4.5635,     5.7035,     0.6830,     0.4563,     0.5703
40709,     6.0702,     6.0702,     5.1289,     0.6070,     0.6070,     0.5129
40801,     7.0711,     0.0000,     7.0711,     0.7071,     0.0000,     0.7071
40802,     7.0540,     0.6948,     7.0540,     0.7054,     0.0695,     0.7054
40803,     7.0021,     1.3928,     7.0021,     0.7002,     0.1393,     0.7002
40804,     6.9138,     2.0973,     6.9138,     0.6914,     0.2097,     0.6914
40805,     6.7860,     2.8108,     6.7860,     0.6786,     0.2811,     0.6786
40806,     6.6144,     3.5355,     6.6144,     0.6614,     0.3535,     0.6614
40807,     6.3934,     4.2719,     6.3934,     0.6393,     0.4272,     0.6393
40808,     6.1159,     5.0192,     6.1159,     0.6116,     0.5019,     0.6116
40809,     5.7735,     5.7735,     5.7735,     0.5774,     0.5774,     0.5774
40010,     6.3439,     7.7301,     0.0000,     0.6344,     0.7730,     0.0000
40011,     5.5557,     8.3147,     0.0000,     0.5556,     0.8315,     0.0000
40012,     4.7140,     8.8192,     0.0000,     0.4714,     0.8819,     0.0000
40013,     3.8268,     9.2388,     0.0000,     0.3827,     0.9239,     0.0000
40014,     2.9028,     9.5694,     0.0000,     0.2903,     0.9569,     0.0000
40015,     1.9509,     9.8079,     0.0000,     0.1951,     0.9808,     0.0000
40016,     0.9802,     9.9518,     0.0000,     0.0980,     0.9952,     0.0000
40111,     5.5348,     8.2835,     0.8660,     0.5535,     0.8283,     0.0866
40113,     3.8102,     9.1987,     0.9310,     0.3810,     0.9199,     0.0931
40115,     1.9417,     9.7618,     0.9681,     0.1942,     0.9762,     0.0968
40117,     0.0000,     9.9518,     0.9802,     0.0000,     0.9952,     0.0980
40210,     6.2583,     7.6257,     1.6378,     0.6258,     0.7626,     0.1638
40211,     5.4724,     8.1900,     1.7254,     0.5472,     0.8190,     0.1725
40212,     4.6372,     8.6756,     1.7970,     0.4637,     0.8676,     0.1797
40213,     3.7605,     9.0786,     1.8538,     0.3761,     0.9079,     0.1854
40214,     2.8501,     9.3957,     1.8969,     0.2850,     0.9396,     0.1897
40215,     1.9143,     9.6240,     1.9271,     0.1914,     0.9624,     0.1927
40216,     0.9615,     9.7618,     1.9450,     0.0961,     0.9762,     0.1945
40217,     0.0000,     9.8079,     1.9509,     0.0000,     0.9808,     0.1951
40311,     5.3688,     8.0350,     2.5719,     0.5369,     0.8035,     0.2572
40313,     3.6781,     8.8798,     2.7606,     0.3678,     0.8880,     0.2761
40315,     1.8690,     9.3958,     2.8680,     0.1869,     0.9396,     0.2868
40317,     0.0000,     9.5694,     2.9028,     0.0000,     0.9569,     0.2903
40410,     6.0036,     7.3154,     3.2313,     0.6004,     0.7315,     0.3231
40411,     5.2249,     7.8196,     3.3991,     0.5225,     0.7820,     0.3399
40412,     4.4095,     8.2496,     3.5355,     0.4410,     0.8250,     0.3536
40413,     3.5638,     8.6038,     3.6434,     0.3564,     0.8604,     0.3643
40414,     2.6939,     8.8807,     3.7250,     0.2694,     0.8881,     0.3725
40415,     1.8060,     9.0794,     3.7820,     0.1806,     0.9079,     0.3782
40416,     0.9060,     9.1989,     3.8157,     0.0906,     0.9199,     0.3816
40417,     0.0000,     9.2388,     3.8268,     0.0000,     0.9239,     0.3827
40511,     5.0418,     7.5455,     4.2007,     0.5042,     0.7545,     0.4201
40513,     3.4185,     8.2530,     4.4946,     0.3419,     0.8253,     0.4495
40515,     1.7261,     8.6776,     4.6604,     0.1726,     0.8678,     0.4660
40517,     0.0000,     8.8192,     4.7140,     0.0000,     0.8819,     0.4714
40610,     5.5868,     6.8076,     4.7375,     0.5587,     0.6808,     0.4738
40611,     4.8207,     7.2147,     4.9708,     0.4821,     0.7215,     0.4971
40612,     4.0382,     7.5550,     5.1590,     0.4038,     0.7555,     0.5159
40613,     3.2435,     7.8306,     5.3067,     0.3244,     0.7831,     0.5307
40614,     2.4399,     8.0433,     5.4178,     0.2440,     0.8043,     0.5418
40615,     1.6300,     8.1944,     5.4951,     0.1630,     0.8194,     0.5495
40616,     0.8160,     8.2847,     5.5406,     0.0816,     0.8285,     0.5541
40617,     0.0000,     8.3147,     5.5557,     0.0000,     0.8315,     0.5556
40711,     4.5635,     6.8297,     5.7035,     0.4563,     0.6830,     0.5703
40713,     3.0404,     7.3402,     6.0727,     0.3040,     0.7340,     0.6073
40715,     1.5185,     7.6341,     6.2781,     0.1519,     0.7634,     0.6278
40717,     0.0000,     7.7301,     6.3439,     0.0000,     0.7730,     0.6344
40810,     5.0192,     6.1159,     6.1159,     0.5019,     0.6116,     0.6116
40811,     4.2719,     6.3934,     6.3934,     0.4272,     0.6393,     0.6393
40812,     3.5355,     6.6144,     6.6144,     0.3535,     0.6614,     0.6614
40813,     2.8109,     6.7860,     6.7860,     0.2811,     0.6786,     0.6786
40814,     2.0973,     6.9138,     6.9138,     0.2097,     0.6914,     0.6914
40815,     1.3928,     7.0021,     7.0021,     0.1393,     0.7002,     0.7002
40816,     0.6948,     7.0540,     7.0540,     0.0695,     0.7054,     0.7054
40817,     0.0000,     7.0711,     7.0711,     0.0000,     0.7071,     0.7071
40901,     6.3439,     0.0000,     7.7301,     0.6344,     0.0000,     0.7730
40903,     6.2583,     1.6378,     7.6257,     0.6258,     0.1638,     0.7626
40905,     6.0036,     3.2313,     7.3154,     0.6004,     0.3231,     0.7315
40907,     5.5868,     4.7375,     6.8076,     0.5587,     0.4738,     0.6808
41001,     5.5557,     0.0000,     8.3147,     0.5556,     0.0000,     0.8315
41002,     5.5348,     0.8660,     8.2835,     0.5535,     0.0866,     0.8283
41003,     5.4724,     1.7254,     8.1900,     0.5472,     0.1725,     0.8190
41004,     5.3688,     2.5719,     8.0350,     0.5369,     0.2572,     0.8035
41005,     5.2249,     3.3991,     7.8196,     0.5225,     0.3399,     0.7820
41006,     5.0418,     4.2007,     7.5455,     0.5042,     0.4201,     0.7545
41007,     4.8207,     4.9708,     7.2147,     0.4821,     0.4971,     0.7215
41008,     4.5635,     5.7035,     6.8297,     0.4563,     0.5703,     0.6830
41101,     4.7140,     0.0000,     8.8192,     0.4714,     0.0000,     0.8819
41103,     4.6372,     1.7970,     8.6756,     0.4637,     0.1797,     0.8676
41105,     4.4095,     3.5355,     8.2496,     0.4410,     0.3536,     0.8250
41107,     4.0382,     5.1590,     7.5550,     0.4038,     0.5159,     0.7555
41201,     3.8268,     0.0000,     9.2388,     0.3827,     0.0000,     0.9239
41202,     3.8102,     0.9310,     9.1987,     0.3810,     0.0931,     0.9199
41203,     3.7605,     1.8538,     9.0786,     0.3761,     0.1854,     0.9079
41204,     3.6781,     2.7606,     8.8798,     0.3678,     0.2761,     0.8880
41205,     3.5638,     3.6434,     8.6038,     0.3564,     0.3643,     0.8604
41206,     3.4185,     4.4946,     8.2530,     0.3419,     0.4495,     0.8253
41207,     3.2435,     5.3067,     7.8306,     0.3244,     0.5307,     0.7831
41208,     3.0404,     6.0727,     7.3402,     0.3040,     0.6073,     0.7340
41301,     2.9028,     0.0000,     9.5694,     0.2903,     0.0000,     0.9569
41303,     2.8501,     1.8969,     9.3957,     0.2850,     0.1897,     0.9396
41305,     2.6939,     3.7250,     8.8807,     0.2694,     0.3725,     0.8881
41307,     2.4399,     5.4178,     8.0433,     0.2440,     0.5418,     0.8043
41401,     1.9509,     0.0000,     9.8079,     0.1951,     0.0000,     0.9808
41402,     1.9417,     0.9681,     9.7618,     0.1942,     0.0968,     0.9762
41403,     1.9143,     1.9271,     9.6240,     0.1914,     0.1927,     0.9624
41404,     1.8690,     2.8680,     9.3958,     0.1869,     0.2868,     0.9396
41405,     1.8060,     3.7820,     9.0794,     0.1806,     0.3782,     0.9079
41406,     1.7261,     4.6604,     8.6776,     0.1726,     0.4660,     0.8678
41407,     1.6300,     5.4951,     8.1944,     0.1630,     0.5495,     0.8194
41408,     1.5185,     6.2781,     7.6341,     0.1519,     0.6278,     0.7634
41501,     0.9802,     0.0000,     9.9518,     0.0980,     0.0000,     0.9952
41503,     0.9615,     1.9450,     9.7618,     0.0961,     0.1945,     0.9762
41505,     0.9060,     3.8157,     9.1989,     0.0906,     0.3816,     0.9199
41507,     0.8160,     5.5406,     8.2847,     0.0816,     0.5541,     0.8285
41601,     0.0000,     0.0000,    10.0000,     0.0000,     0.0000,     1.0000
41602,     0.0000,     0.9802,     9.9518,     0.0000,     0.0980,     0.9952
41603,     0.0000,     1.9509,     9.8079,     0.0000,     0.1951,     0.9808
41604,     0.0000,     2.9028,     9.5694,     0.0000,     0.2903,     0.9569
41605,     0.0000,     3.8268,     9.2388,     0.0000,     0.3827,     0.9239
41606,     0.0000,     4.7140,     8.8192,     0.0000,     0.4714,     0.8819
41607,     0.0000,     5.5557,     8.3147,     0.0000,     0.5556,     0.8315
41608,     0.0000,     6.3439,     7.7301,     0.0000,     0.6344,     0.7730
*ELSET,ELSET=EALL
S8_P2,S8_P4
*MATERIAL,NAME=A1
*ELASTIC,TYPE=ISO
 6.825E+07,     0.3000,     0.0000
**GENERAL RIGID ELEMENTS
*SHELL SECTION,MATERIAL=A1,ELSET=EALL
 4.000E-02,
*NSET,NSET=XSYM,GEN
 20009,20409,100
 20801,20804,1
 40017,40817,100
 41601,41608,1
*NSET,NSET=YSYM,GEN
 20001,20801,100
 40001,41601,100
*BOUNDARY,OP=NEW
 XSYM,XSYMM
 YSYM,YSYMM
 20801,3,3
 41601,3,3
*STEP
*STATIC
*CLOAD,OP=NEW
20001,     1,  2.000E+00
20009,     2, -2.000E+00
40001,     1,  2.000E+00
40017,     2, -2.000E+00
*NODE PRINT,NSET=DISPSET
 U,
 COORD,
*NODE FILE,NSET=DISPSET
 U,
 COORD,
*OUTPUT,FIELD
*NODE OUTPUT,NSET=DISPSET
U,
COORD,
*EL PRINT,FREQUENCY=0
*END STEP
