*HEADING
: NAFEMS TEST LE3, Hemispherical Shell with Point Loads  [S9R5]
*ELEMENT,TYPE=S9R5     ,ELSET=S8_P2
 2001, 20001, 20003, 20203, 20201, 20002, 20103, 20202, 20101,     4
 2002, 20003, 20005, 20205, 20203, 20004, 20105, 20204, 20103,     5
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*ELEMENT,TYPE=S9R5     ,ELSET=S8_P4
 4001, 40001, 40003, 40203, 40201, 40002, 40103, 40202, 40101,    43
 4002, 40003, 40005, 40205, 40203, 40004, 40105, 40204, 40103,    44
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*NODE,NSET=DISPSET
20001,    10.0000,     0.0000,     0.0000,     1.0000,     0.0000,     0.0000
20009,     0.0000,    10.0000,     0.0000,     0.0000,     1.0000,     0.0000
40001,    10.0000,     0.0000,     0.0000,     1.0000,     0.0000,     0.0000
40017,     0.0000,    10.0000,     0.0000,     0.0000,     1.0000,     0.0000
*NODE,NSET=GENSET
20002,     9.8079,     1.9509,     0.0000,     0.9808,     0.1951,     0.0000
20003,     9.2388,     3.8268,     0.0000,     0.9239,     0.3827,     0.0000
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*NODE,NSET=MIDNOD
    4,     9.6211,     1.9176,     1.9382,     0.9621,     0.1918,     0.1938
    5,     8.1839,     5.4815,     1.7252,     0.8184,     0.5482,     0.1725
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*ELSET,ELSET=EALL
S8_P2,S8_P4
*MATERIAL,NAME=A1
*ELASTIC,TYPE=ISO
 6.825E+07,     0.3000,     0.0000
*SHELL SECTION,MATERIAL=A1,ELSET=EALL
 4.000E-02,
*NSET,NSET=XSYM,GEN
 20009,20409,100
 20801,20804,1
 40017,40817,100
 41601,41608,1
*NSET,NSET=YSYM,GEN
 20001,20801,100
 40001,41601,100
*BOUNDARY,OP=NEW
 XSYM,XSYMM
 YSYM,YSYMM
 20801,3,3
 41601,3,3
*STEP
*STATIC
*CLOAD,OP=NEW
20001,     1,  2.000E+00
20009,     2, -2.000E+00
40001,     1,  2.000E+00
40017,     2, -2.000E+00
*NODE PRINT,NSET=DISPSET
 U,
 COORD,
*NODE FILE,NSET=DISPSET
 U,
 COORD,
*OUTPUT,FIELD
*NODE OUTPUT,NSET=DISPSET
U,
COORD,
*EL PRINT,FREQUENCY=0
*END STEP
