*HEADING
: NAFEMS TEST LE3, Hemispherical Shell with Point Loads  [STRI3]
*ELEMENT,TYPE=STRI3   ,ELSET=S3_P2
 1000,     8,     9,    11
 1001,    12,    11,     9
 1002,     9,    10,    12
 1003,    13,    12,    10
 1004,    10,    17,    13
 1005,    19,    13,    17
 1006,    17,    18,    19
 1007,    20,    19,    18
 1008,    11,    12,    14
 1009,    15,    14,    12
 1010,    12,    13,    15
 1011,    16,    15,    13
 1012,    13,    19,    16
 1013,    21,    16,    19
 1014,    19,    20,    21
 1015,    22,    21,    20
 1016,    15,    16,    24
 1017,    21,    24,    16
 1018,    14,    15,    23
 1019,    24,    23,    15
 1020,    21,    22,    24
 1021,    26,    24,    22
 1022,    23,    24,    25
 1023,    26,    25,    24
*ELEMENT,TYPE=STRI3   ,ELSET=S3_P4
 3000,    64,    65,    69
 3001,    70,    69,    65
 3002,    65,    66,    70
 3003,    71,    70,    66
 3004,    66,    67,    71
 3005,    72,    71,    67
 3006,    67,    68,    72
 3007,    73,    72,    68
 3008,    68,    89,    73
 3009,    93,    73,    89
 3010,    89,    90,    93
 3011,    94,    93,    90
 3012,    90,    91,    94
 3013,    95,    94,    91
 3014,    91,    92,    95
 3015,    96,    95,    92
 3016,    69,    70,    74
 3017,    75,    74,    70
 3018,    70,    71,    75
 3019,    76,    75,    71
 3020,    71,    72,    76
 3021,    77,    76,    72
 3022,    72,    73,    77
 3023,    78,    77,    73
 3024,    73,    93,    78
 3025,    97,    78,    93
 3026,    93,    94,    97
 3027,    98,    97,    94
 3028,    94,    95,    98
 3029,    99,    98,    95
 3030,    95,    96,    99
 3031,   100,    99,    96
 3032,    74,    75,    79
 3033,    80,    79,    75
 3034,    75,    76,    80
 3035,    81,    80,    76
 3036,    76,    77,    81
 3037,    82,    81,    77
 3038,    77,    78,    82
 3039,    83,    82,    78
 3040,    78,    97,    83
 3041,   101,    83,    97
 3042,    97,    98,   101
 3043,   102,   101,    98
 3044,    98,    99,   102
 3045,   103,   102,    99
 3046,    99,   100,   103
 3047,   104,   103,   100
 3048,    79,    80,    84
 3049,    85,    84,    80
 3050,    80,    81,    85
 3051,    86,    85,    81
 3052,    81,    82,    86
 3053,    87,    86,    82
 3054,    82,    83,    87
 3055,    88,    87,    83
 3056,    83,   101,    88
 3057,   105,    88,   101
 3058,   101,   102,   105
 3059,   106,   105,   102
 3060,   102,   103,   106
 3061,   107,   106,   103
 3062,   103,   104,   107
 3063,   108,   107,   104
 3064,    87,    88,   112
 3065,   105,   112,    88
 3066,    84,    85,   109
 3067,   110,   109,    85
 3068,    85,    86,   110
 3069,   111,   110,    86
 3070,    86,    87,   111
 3071,   112,   111,    87
 3072,   105,   106,   112
 3073,   116,   112,   106
 3074,   106,   107,   116
 3075,   120,   116,   107
 3076,   107,   108,   120
 3077,   124,   120,   108
 3078,   109,   110,   113
 3079,   114,   113,   110
 3080,   110,   111,   114
 3081,   115,   114,   111
 3082,   111,   112,   115
 3083,   116,   115,   112
 3084,   113,   114,   117
 3085,   118,   117,   114
 3086,   114,   115,   118
 3087,   119,   118,   115
 3088,   115,   116,   119
 3089,   120,   119,   116
 3090,   117,   118,   121
 3091,   122,   121,   118
 3092,   118,   119,   122
 3093,   123,   122,   119
 3094,   119,   120,   123
 3095,   124,   123,   120
*NODE
    8,    10.0000,     0.0000,     0.0000,     1.0000,     0.0000,     0.0000
    9,     9.2388,     3.8268,     0.0000,     0.9239,     0.3827,     0.0000
   10,     7.0711,     7.0711,     0.0000,     0.7071,     0.7071,     0.0000
   11,     9.2388,     0.0000,     3.8268,     0.9239,     0.0000,     0.3827
   12,     8.6038,     3.5638,     3.6434,     0.8604,     0.3564,     0.3643
   13,     6.7389,     6.7389,     3.0291,     0.6739,     0.6739,     0.3029
   14,     7.0711,     0.0000,     7.0711,     0.7071,     0.0000,     0.7071
   15,     6.7860,     2.8108,     6.7860,     0.6786,     0.2811,     0.6786
   16,     5.7735,     5.7735,     5.7735,     0.5774,     0.5774,     0.5774
   17,     3.8268,     9.2388,     0.0000,     0.3827,     0.9239,     0.0000
   18,     0.0000,    10.0000,     0.0000,     0.0000,     1.0000,     0.0000
   19,     3.5638,     8.6038,     3.6434,     0.3564,     0.8604,     0.3643
   20,     0.0000,     9.2388,     3.8268,     0.0000,     0.9239,     0.3827
   21,     2.8109,     6.7860,     6.7860,     0.2811,     0.6786,     0.6786
   22,     0.0000,     7.0711,     7.0711,     0.0000,     0.7071,     0.7071
   23,     3.8268,     0.0000,     9.2388,     0.3827,     0.0000,     0.9239
   24,     3.5638,     3.6434,     8.6038,     0.3564,     0.3643,     0.8604
   25,     0.0000,     0.0000,    10.0000,     0.0000,     0.0000,     1.0000
   26,     0.0000,     3.8268,     9.2388,     0.0000,     0.3827,     0.9239
   64,    10.0000,     0.0000,     0.0000,     1.0000,     0.0000,     0.0000
   65,     9.8079,     1.9509,     0.0000,     0.9808,     0.1951,     0.0000
   66,     9.2388,     3.8268,     0.0000,     0.9239,     0.3827,     0.0000
   67,     8.3147,     5.5557,     0.0000,     0.8315,     0.5556,     0.0000
   68,     7.0711,     7.0711,     0.0000,     0.7071,     0.7071,     0.0000
   69,     9.8079,     0.0000,     1.9509,     0.9808,     0.0000,     0.1951
   70,     9.6240,     1.9143,     1.9271,     0.9624,     0.1914,     0.1927
   71,     9.0787,     3.7605,     1.8538,     0.9079,     0.3760,     0.1854
   72,     8.1900,     5.4724,     1.7254,     0.8190,     0.5472,     0.1725
   73,     6.9875,     6.9875,     1.5326,     0.6988,     0.6988,     0.1533
   74,     9.2388,     0.0000,     3.8268,     0.9239,     0.0000,     0.3827
   75,     9.0794,     1.8060,     3.7820,     0.9079,     0.1806,     0.3782
   76,     8.6038,     3.5638,     3.6434,     0.8604,     0.3564,     0.3643
   77,     7.8196,     5.2249,     3.3991,     0.7820,     0.5225,     0.3399
   78,     6.7389,     6.7389,     3.0291,     0.6739,     0.6739,     0.3029
   79,     8.3147,     0.0000,     5.5557,     0.8315,     0.0000,     0.5556
   80,     8.1944,     1.6300,     5.4951,     0.8194,     0.1630,     0.5495
   81,     7.8306,     3.2435,     5.3067,     0.7831,     0.3244,     0.5307
   82,     7.2147,     4.8207,     4.9708,     0.7215,     0.4821,     0.4971
   83,     6.3310,     6.3310,     4.4539,     0.6331,     0.6331,     0.4454
   84,     7.0711,     0.0000,     7.0711,     0.7071,     0.0000,     0.7071
   85,     7.0021,     1.3928,     7.0021,     0.7002,     0.1393,     0.7002
   86,     6.7860,     2.8108,     6.7860,     0.6786,     0.2811,     0.6786
   87,     6.3934,     4.2719,     6.3934,     0.6393,     0.4272,     0.6393
   88,     5.7735,     5.7735,     5.7735,     0.5774,     0.5774,     0.5774
   89,     5.5557,     8.3147,     0.0000,     0.5556,     0.8315,     0.0000
   90,     3.8268,     9.2388,     0.0000,     0.3827,     0.9239,     0.0000
   91,     1.9509,     9.8079,     0.0000,     0.1951,     0.9808,     0.0000
   92,     0.0000,    10.0000,     0.0000,     0.0000,     1.0000,     0.0000
   93,     5.4724,     8.1900,     1.7254,     0.5472,     0.8190,     0.1725
   94,     3.7605,     9.0786,     1.8538,     0.3761,     0.9079,     0.1854
   95,     1.9143,     9.6240,     1.9271,     0.1914,     0.9624,     0.1927
   96,     0.0000,     9.8079,     1.9509,     0.0000,     0.9808,     0.1951
   97,     5.2249,     7.8196,     3.3991,     0.5225,     0.7820,     0.3399
   98,     3.5638,     8.6038,     3.6434,     0.3564,     0.8604,     0.3643
   99,     1.8060,     9.0794,     3.7820,     0.1806,     0.9079,     0.3782
  100,     0.0000,     9.2388,     3.8268,     0.0000,     0.9239,     0.3827
  101,     4.8207,     7.2147,     4.9708,     0.4821,     0.7215,     0.4971
  102,     3.2435,     7.8306,     5.3067,     0.3244,     0.7831,     0.5307
  103,     1.6300,     8.1944,     5.4951,     0.1630,     0.8194,     0.5495
  104,     0.0000,     8.3147,     5.5557,     0.0000,     0.8315,     0.5556
  105,     4.2719,     6.3934,     6.3934,     0.4272,     0.6393,     0.6393
  106,     2.8109,     6.7860,     6.7860,     0.2811,     0.6786,     0.6786
  107,     1.3928,     7.0021,     7.0021,     0.1393,     0.7002,     0.7002
  108,     0.0000,     7.0711,     7.0711,     0.0000,     0.7071,     0.7071
  109,     5.5557,     0.0000,     8.3147,     0.5556,     0.0000,     0.8315
  110,     5.4724,     1.7254,     8.1900,     0.5472,     0.1725,     0.8190
  111,     5.2249,     3.3991,     7.8196,     0.5225,     0.3399,     0.7820
  112,     4.8207,     4.9708,     7.2147,     0.4821,     0.4971,     0.7215
  113,     3.8268,     0.0000,     9.2388,     0.3827,     0.0000,     0.9239
  114,     3.7605,     1.8538,     9.0786,     0.3761,     0.1854,     0.9079
  115,     3.5638,     3.6434,     8.6038,     0.3564,     0.3643,     0.8604
  116,     3.2435,     5.3067,     7.8306,     0.3244,     0.5307,     0.7831
  117,     1.9509,     0.0000,     9.8079,     0.1951,     0.0000,     0.9808
  118,     1.9143,     1.9271,     9.6240,     0.1914,     0.1927,     0.9624
  119,     1.8060,     3.7820,     9.0794,     0.1806,     0.3782,     0.9079
  120,     1.6300,     5.4951,     8.1944,     0.1630,     0.5495,     0.8194
  121,     0.0000,     0.0000,    10.0000,     0.0000,     0.0000,     1.0000
  122,     0.0000,     1.9509,     9.8079,     0.0000,     0.1951,     0.9808
  123,     0.0000,     3.8268,     9.2388,     0.0000,     0.3827,     0.9239
  124,     0.0000,     5.5557,     8.3147,     0.0000,     0.5556,     0.8315
*ELSET,ELSET=EALL
S3_P2,S3_P4
*MATERIAL,NAME=A1
*ELASTIC,TYPE=ISO
 6.825E+07,     0.3000,     0.0000
**GENERAL RIGID ELEMENTS
*SHELL SECTION,MATERIAL=A1,ELSET=EALL
 4.000E-02,
*NSET,NSET=DISPSET
 8,64
*NSET,NSET=ZCONSTR
 8,64
*NSET,NSET=YSYM
 8,11,14,23,25,64,69,74,79,84,109,113,117,121
*NSET,NSET=XSYM
 18,20,22,25,26,92,96,100,104,108,121,122,123,124
*STEP
*STATIC
*BOUNDARY,OP=NEW
 ZCONSTR,3
 XSYM,XSYMM
 YSYM,YSYMM
*CLOAD,OP=NEW
    8,     1,  2.000E+00
   18,     2, -2.000E+00
   64,     1,  2.000E+00
   92,     2, -2.000E+00
*NODE PRINT,NSET=DISPSET
 U,
 COORD,
*NODE FILE,NSET=DISPSET
 U,
 COORD,
*OUTPUT,FIELD
*NODE OUTPUT,NSET=DISPSET
U,
COORD,
*EL PRINT,FREQUENCY=0
*END STEP
