*HEADING
: NAFEMS TEST LE3, Hemispherical Shell with Point Loads  [S4R]
*ELEMENT,TYPE=S4R     ,ELSET=S4_P2
 1000,     8,     9,    12,    11
 1001,     9,    10,    13,    12
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*ELEMENT,TYPE=S4R     ,ELSET=S4_P4
 3000,    64,    65,    70,    69
 3001,    65,    66,    71,    70
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*NODE
    8,    10.0000,     0.0000,     0.0000,     1.0000,     0.0000,     0.0000
    9,     9.2388,     3.8268,     0.0000,     0.9239,     0.3827,     0.0000
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*ELSET,ELSET=EALL
S4_P2,S4_P4
*MATERIAL,NAME=A1
*ELASTIC,TYPE=ISO
 6.825E+07,     0.3000,     0.0000
**GENERAL RIGID ELEMENTS
*SHELL SECTION,MATERIAL=A1,ELSET=EALL,CONTROLS=HGC
 4.000E-02,
*SECTION CONTROLS,NAME=HGC,HOURGLASS=ENHANCED
*NSET,NSET=ZCONSTR
 8,64
*NSET,NSET=XSYM
 18,20,22,25,26,92,96,100,104,108,121,122,123,124
*NSET,NSET=YSYM
 8,11,14,23,25,64,69,74,79,84,109,113,117,121
*NSET,NSET=DISPSET
8,64
*STEP,PERTURB
*STATIC
*BOUNDARY,OP=NEW
 ZCONSTR,3
 XSYM,XSYMM
 YSYM,YSYMM
*CLOAD,OP=NEW
    8,     1,  2.000E+00
   18,     2, -2.000E+00
   64,     1,  2.000E+00
   92,     2, -2.000E+00
*NODE PRINT,NSET=DISPSET
 U,
 COORD,
*NODE FILE,NSET=DISPSET
 U,
 COORD,
*OUTPUT,FIELD
*NODE OUTPUT,NSET=DISPSET
U,
COORD,
*EL PRINT,FREQUENCY=0
*END STEP
