**
**
**
** file created by  A N S A  Wed Sep 01 13:13:01 2010
**
** output from :
**
** Z:/b16/do_not_delete/Subcycling/4.2.5/Job-1.inp
**
*HEADING

**
**
**
*PREPRINT, CONTACT=NO, ECHO=NO, HISTORY=NO, MODEL=NO
*PHYSICAL CONSTANTS, ABSOLUTE ZERO=0., STEFAN BOLTZMANN=0.
*NODE
       1,               0.,              -1.,              -1.
       2,           0.3125,              -1.,              -1.
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**
** MEMBRANE and STRUCTURAL ELEMENTS
**
*ELEMENT, TYPE=S4RS, ELSET=PART-1-1_EALL
       1,        1,      885,      890,      884
       2,        2,      893,      898,      892
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**
**
**
**
** SECTION DATA
**
*SHELL SECTION, ELSET=PART-1-1_EALL, MATERIAL=A1, SECTION INTEGRATION=SIMPSON
             0.1,        5
**
** AMPLITUDES
**
*AMPLITUDE, NAME=RAMP, DEFINITION=TABULAR, SMOOTH=0., VALUE=RELATIVE, TIME=STEP TIME
              0.,               0.,             0.25,               1.
**
** MATERIALS
**
**
**A1
**
*MATERIAL, NAME=A1
*DENSITY
           7800.,
*ELASTIC, TYPE=ISOTROPIC
          2.1E11,              0.3
**
**
**
**
** SETS
**
*NSET, NSET=PART-1-1_ALL
       1,        2,        3,        4,        5,        6
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*NSET, NSET=PART-1-1_FIX
       1,      101,      175,      189,      201,      301
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*NSET, NSET=PART-1-1_FREE
      33,      133,      233,      333,      433,      533,      633,      733,      833,      933,
    1033,     1133,     1233,     1333,     1433,     1533
*NSET, NSET=PART-1-1_QA_TEST
PART-1-1_FREE,
      33,      133,      233,      333,      433,      533,      633,      733,      833,      933,
    1033,     1133,     1233,     1333,     1433,     1533
*ELSET, ELSET=PART-1-1_EALL
       1,        2,        3,        4,        5,        6
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*ELSET, ELSET=PART-1-1_HIST
       1,        9,       34,       35,       71,       83
*ELSET, ELSET=PART-1-1_PRINT
       8,       60,      535,      539,      540,      543
*ELSET, ELSET=SUBCYCLINGZONE
       1,        2,        3,        4,        7,        8
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*NSET, NSET=TIE_TOP_HR
      37,       38,       40,       42,       44,       46,       48,       50,      137
*NSET, NSET=TIE_TOP_VR
     137,      140,      143,      145,      147,      151
*NSET, NSET=TIE_BOT_HR
      59,       61,       63,       65,       67,       69,       71,       73,      136
*NSET, NSET=TIE_BOT_VR
      75,       79,       81,       99,      134,      136
*NSET, NSET=TIE_TOP_HR_FINE
    1001,     1002,     1003,     1004,     1005,     1006
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*NSET, NSET=TIE_TOP_VR_FINE
    1009,     1109,     1209,     1309,     1409,     1509,     1877,     1908,     1909,     1934,
    1959,
*NSET, NSET=TIE_BOT_VR_FINE
       9,      109,      209,      309,      393,      397,      409,      509,      979,     1078,
    1390,
*NSET, NSET=TIE_BOT_HR_FINE
      34,      237,      240,      243,      249,      252
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**
** SURFACE DEFINITIONS
*SURFACE, NAME=TOP_HR, TYPE=NODE
TIE_TOP_HR,
**
*SURFACE, NAME=TOP_VR, TYPE=NODE
TIE_TOP_VR,
**
*SURFACE, NAME=BOT_HR, TYPE=NODE
TIE_BOT_HR,
**
*SURFACE, NAME=BOT_VR, TYPE=NODE
TIE_BOT_VR,
**
*SURFACE, NAME=TOP_HR_FINE, TYPE=NODE
TIE_TOP_HR_FINE,
**
*SURFACE, NAME=TOP_VR_FINE, TYPE=NODE
TIE_TOP_VR_FINE,
**
*SURFACE, NAME=BOT_HR_FINE, TYPE=NODE
TIE_BOT_HR_FINE,
**
*SURFACE, NAME=BOT_VR_FINE, TYPE=NODE
TIE_BOT_VR_FINE,
**
**TIE
*TIE, NAME=TH, POSITION TOLERANCE=0.2, ADJUST=NO
TOP_HR_FINE, TOP_HR
**
*TIE, NAME=TV, POSITION TOLERANCE=0.2, ADJUST=NO
TOP_VR_FINE, TOP_VR
**
*TIE, NAME=BH, POSITION TOLERANCE=0.2, ADJUST=NO
BOT_HR_FINE, BOT_HR
**
*TIE, NAME=BV, POSITION TOLERANCE=0.2, ADJUST=NO
BOT_VR_FINE, BOT_VR
**
** BOUNDARY
**
*BOUNDARY, TYPE=DISPLACEMENT
PART-1-1_FIX,        1,        6,               0.
**
*SUBCYCLING, ELSET=SUBCYCLINGZONE
** STEPS
**
**
** STEP 1
**
*STEP, NAME=Anonymous STEP 1
*DYNAMIC, EXPLICIT
,             0.25
**
** CLOAD
**
*CLOAD, AMPLITUDE=RAMP
      33,        3,          -60000.
     133,        3,         -120000.
     233,        3,         -120000.
     333,        3,         -120000.
     433,        3,         -120000.
     533,        3,          -60000.
    1033,        3,           60000.
    1133,        3,          120000.
    1233,        3,          120000.
    1333,        3,          120000.
    1433,        3,          120000.
    1533,        3,           60000.
*OUTPUT, FIELD, NUMBER INTERVAL=5, VARIABLE=PRESELECT
*OUTPUT, FIELD, TIME MARKS=YES, NUMBER INTERVAL=4
*NODE OUTPUT, NSET=PART-1-1_QA_TEST
U,
*OUTPUT, HISTORY, TIME INTERVAL=0.025, VARIABLE=PRESELECT
*FILE OUTPUT, TIME MARKS=YES, NUMBER INTERVAL=4
*NODE FILE, NSET=PART-1-1_QA_TEST
U,
*ENERGY FILE
*END STEP
