*HEADING
: NAFEMS TEST LE5, Z-Section Cantilever  [B31OS]
*PRE PRINT,ECHO=YES,MODEL=NO,HISTORY=NO
*NODE
 1,0.0,0.0
 9,10.0
*NGEN
 1,9
*ELEMENT,TYPE=B31OS, ELSET=EALL
 1,1,2
*ELGEN, ELSET=EALL
 1,8
*BEAM SECTION,SECTION=ARB, ELSET=EALL, MATERIAL=MAT
 6, -1.0, -1.0, -1.0, -0.5, 0.1
 -1.0,0.0, 0.1
  0.0,0.0, 0.1
 1.0, 0.0, 0.1
 1.0, 0.5, 0.1
 1.0, 1.0, 0.1
*MATERIAL,NAME=MAT
*ELASTIC
 210E9,0.3
*BOUNDARY
 1,1,7
*STEP,PERTURBATION
*STATIC
*CLOAD
 9,4,1.2E6
*EL PRINT,FREQ=0
*NODE PRINT,FREQ=0
*EL FILE,POS=AVERAGED AT NODES
 S,
*NODE FILE
 COORD,
*OUTPUT,FIELD
*NODE OUTPUT
COORD,
*END STEP
