*HEADING
: NAFEMS TEST LE6: SKEW PLATE NORMAL PRESSURE
COARSE MESH, S8R5 ELEMENTS
*NODE
 1,0.,0.
 5,1.,0.
41,0.86603,0.5
45,1.86603,0.5
*NGEN,NSET=EDGE1
1,5
*NGEN,NSET=EDGE3
41,45
*NFILL,NSET=ALLN
EDGE1,EDGE3,4,10
*NSET,NSET=EDGE2,GEN
5,45,10
*NSET,NSET=EDGE4,GEN
1,41,10
**
*ELEMENT,TYPE=S8R5
1, 1,3,23,21,2,13,22,11
*ELGEN,ELSET=SHELLS
1, 2,2,1, 2,20,2
*SHELL SECTION,ELSET=SHELLS,MATERIAL=MAT
0.01,
*MATERIAL,NAME=MAT
*ELASTIC
210.E9,0.3
**
*BOUNDARY
EDGE1,3,3
EDGE2,3,3
EDGE3,3,3
EDGE4,3,3
1,1,2
5,2
**
*STEP
*STATIC
*DLOAD
SHELLS,P,-0.7E3
*NODE PRINT,F=0
*EL PRINT,POSITION=AVERAGED AT NODES
S,
SINV,
*EL FILE,POSITION=AVERAGED AT NODES
SINV,
*ENDSTEP
